<?xml version="1.0"?>
<?xml-stylesheet type="text/xsl" href="http://jsbsim.sourceforge.net/JSBSim.xsl"?>
<fdm_config name="SimpleUAV" version="2.0" release="BETA"
    xmlns:xsi="http://www.w3.org/2001/XMLSchema-instance"
    xsi:noNamespaceSchemaLocation="http://jsbsim.sourceforge.net/JSBSim.xsd">

    <fileheader>
        <author> Auto-generated </author>
        <filecreationdate> 2024-05-22 </filecreationdate>
        <version> 1.0 </version>
        <description> Simple UAV matching JAX demo </description>
    </fileheader>

    <metrics>
        <wingarea  unit="M2">  0.55 </wingarea>
        <wingspan  unit="M">   2.8956 </wingspan>
        <wing_incidence> 0.0 </wing_incidence>
        <chord     unit="M">   0.18994 </chord>
        <htailarea unit="M2">  0.0 </htailarea>
        <htailarm  unit="M">   0.0 </htailarm>
        <vtailarea unit="M2">  0.0 </vtailarea>
        <vtailarm  unit="M">   0.0 </vtailarm>
        <location name="AERORP" unit="M">
            <x> 0.0 </x>
            <y> 0.0 </y>
            <z> 0.0 </z>
        </location>
        <location name="EYEPOINT" unit="M">
            <x> 0.0 </x>
            <y> 0.0 </y>
            <z> 0.0 </z>
        </location>
        <location name="VRP" unit="M">
            <x> 0.0 </x>
            <y> 0.0 </y>
            <z> 0.0 </z>
        </location>
    </metrics>

    <mass_balance>
        <ixx> 0.1346 </ixx>
        <iyy> 0.1604 </iyy>
        <izz> 0.1604 </izz>
        <ixy> 0.0 </ixy>
        <ixz> 0.0 </ixz>
        <iyz> 0.0 </iyz>
        <emptywt unit="LBS"> 29.76 </emptywt>
        <location name="CG" unit="M">
            <x> 0.0 </x>
            <y> 0.0 </y>
            <z> 0.0 </z>
        </location>
    </mass_balance>

    <ground_reactions>
        <contact type="STRUCTURE" name="NOSE">
            <location unit="M">
                <x>  0.2 </x>
                <y>  0.0 </y>
                <z> -0.1 </z>
            </location>
            <static_friction>  0.5 </static_friction>
            <dynamic_friction> 0.5 </dynamic_friction>
            <spring_coeff unit="LBS/FT">       200.0 </spring_coeff>
            <damping_coeff unit="LBS/FT/SEC">  100.0 </damping_coeff>
        </contact>
    </ground_reactions>


    <aerodynamics>
        <axis name="LIFT">
            <function name="aero/force/Lift_alpha">
                <description>Lift due to alpha</description>
                <product>
                    <property>aero/qbar-psf</property>
                    <property>metrics/Sw-sqft</property>
                    <sum>
                        <value> 0.28 </value>
                        <product>
                            <property>aero/alpha-rad</property>
                            <value> 3.45 </value>
                        </product>
                    </sum>
                </product>
            </function>
        </axis>

        <axis name="DRAG">
            <function name="aero/force/Drag_basic">
                <description>Drag basic</description>
                <product>
                    <property>aero/qbar-psf</property>
                    <property>metrics/Sw-sqft</property>
                    <sum>
                        <value> 0.03 </value>
                        <product>
                            <property>aero/alpha-rad</property>
                            <property>aero/alpha-rad</property>
                            <value> 0.30 </value>
                        </product>
                    </sum>
                </product>
            </function>
        </axis>

        <axis name="SIDE">
            <function name="aero/force/Side_beta">
                <description>Side force due to beta</description>
                <product>
                    <property>aero/qbar-psf</property>
                    <property>metrics/Sw-sqft</property>
                    <sum>
                        <product>
                            <property>aero/beta-rad</property>
                            <value> -0.98 </value>
                        </product>
                        <product>
                            <property>fcs/rudder-pos-rad</property>
                            <value> 0.17 </value>
                        </product>
                    </sum>
                </product>
            </function>
        </axis>

        <axis name="ROLL">
            <function name="aero/moment/Roll_beta">
                <description>Roll moment due to beta</description>
                <product>
                    <property>aero/qbar-psf</property>
                    <property>metrics/Sw-sqft</property>
                    <property>metrics/bw-ft</property>
                    <sum>
                        <product>
                            <property>aero/beta-rad</property>
                            <value> -0.12 </value>
                        </product>
                        <product>
                            <property>fcs/left-aileron-pos-rad</property>
                            <value> 0.08 </value>
                        </product>
                        <product>
                            <property>fcs/rudder-pos-rad</property>
                            <value> 0.105 </value>
                        </product>
                    </sum>
                </product>
            </function>
            <function name="aero/moment/Roll_p">
                <description>Roll moment due to roll rate</description>
                <product>
                    <property>aero/qbar-psf</property>
                    <property>metrics/Sw-sqft</property>
                    <property>metrics/bw-ft</property>
                    <property>aero/bi2vel</property>
                    <property>velocities/p-aero-rad_sec</property>
                    <value> -0.26 </value>
                </product>
            </function>
            <function name="aero/moment/Roll_r">
                <description>Roll moment due to yaw rate</description>
                <product>
                    <property>aero/qbar-psf</property>
                    <property>metrics/Sw-sqft</property>
                    <property>metrics/bw-ft</property>
                    <property>aero/bi2vel</property>
                    <property>velocities/r-aero-rad_sec</property>
                    <value> 0.14 </value>
                </product>
            </function>
        </axis>

        <axis name="PITCH">
            <function name="aero/moment/Pitch_alpha">
                <description>Pitch moment due to alpha</description>
                <product>
                    <property>aero/qbar-psf</property>
                    <property>metrics/Sw-sqft</property>
                    <property>metrics/cbarw-ft</property>
                    <sum>
                        <value> 0.0 </value>
                        <product>
                            <property>aero/alpha-rad</property>
                            <value> -0.38 </value>
                        </product>
                        <product>
                            <property>fcs/elevator-pos-rad</property>
                            <value> -0.5 </value>
                        </product>
                    </sum>
                </product>
            </function>
            <function name="aero/moment/Pitch_q">
                <description>Pitch moment due to pitch rate</description>
                <product>
                    <property>aero/qbar-psf</property>
                    <property>metrics/Sw-sqft</property>
                    <property>metrics/cbarw-ft</property>
                    <property>aero/ci2vel</property>
                    <property>velocities/q-aero-rad_sec</property>
                    <value> -3.6 </value>
                </product>
            </function>
        </axis>

        <axis name="YAW">
            <function name="aero/moment/Yaw_beta">
                <description>Yaw moment due to beta</description>
                <product>
                    <property>aero/qbar-psf</property>
                    <property>metrics/Sw-sqft</property>
                    <property>metrics/bw-ft</property>
                    <sum>
                        <product>
                            <property>aero/beta-rad</property>
                            <value> 0.25 </value>
                        </product>
                        <product>
                            <property>fcs/left-aileron-pos-rad</property>
                            <value> 0.06 </value>
                        </product>
                        <product>
                            <property>fcs/rudder-pos-rad</property>
                            <value> -0.032 </value>
                        </product>
                    </sum>
                </product>
            </function>
            <function name="aero/moment/Yaw_p">
                <description>Yaw moment due to roll rate</description>
                <product>
                    <property>aero/qbar-psf</property>
                    <property>metrics/Sw-sqft</property>
                    <property>metrics/bw-ft</property>
                    <property>aero/bi2vel</property>
                    <property>velocities/p-aero-rad_sec</property>
                    <value> 0.022 </value>
                </product>
            </function>
            <function name="aero/moment/Yaw_r">
                <description>Yaw moment due to yaw rate</description>
                <product>
                    <property>aero/qbar-psf</property>
                    <property>metrics/Sw-sqft</property>
                    <property>metrics/bw-ft</property>
                    <property>aero/bi2vel</property>
                    <property>velocities/r-aero-rad_sec</property>
                    <value> -0.35 </value>
                </product>
            </function>
        </axis>

    </aerodynamics>

</fdm_config>
